# Title: ÖVN1 - André Wisén
# Description: https://andrewisen.se/
# GRUPP
# Gruppnummer enligt ÖVN1 (2020).
Grupp := 7
# INDATA, GRUPP
# Funktionerna nedan hämtar data från Tabell 1 i ÖVN1 (2020).
# Nockbalkensspännvidd: | Husets halva bredd:
Get_L.nb(Grupp) :=
    6.2 m if Grupp == 0
    7.2 m if Grupp == 1
    8.4 m if Grupp == 2
    6.0 m if Grupp == 3
    7.2 m if Grupp == 4
    8.4 m if Grupp == 5
    6.0 m if Grupp == 6
    7.2 m if Grupp == 7
    8.4 m if Grupp == 8
    6.0 m if Grupp == 9
    "null" otherwise
Get_a(Grupp) :=
    4.2 m if Grupp == 0
    4.0 m if Grupp == 1
    3.8 m if Grupp == 2
    4.0 m if Grupp == 3
    4.2 m if Grupp == 4
    4.0 m if Grupp == 5
    4.2 m if Grupp == 6
    3.8 m if Grupp == 7
    4.2 m if Grupp == 8
    3.8 m if Grupp == 9
    "null" otherwise
# Taklutning: | Vägghöjd vid takfot:
Get_β(Grupp) :=
    14 deg if Grupp == 0
    22 deg if Grupp == 1
    28 deg if Grupp == 2
    14 deg if Grupp == 3
    22 deg if Grupp == 4
    27 deg if Grupp == 5
    14 deg if Grupp == 6
    22 deg if Grupp == 7
    27 deg if Grupp == 8
    22 deg if Grupp == 9
    "null" otherwise
Get_H.vägg(Grupp) :=
    2.9 m if Grupp == 0
    2.7 m if Grupp == 1
    2.5 m if Grupp == 2
    2.7 m if Grupp == 3
    2.5 m if Grupp == 4
    2.9 m if Grupp == 5
    2.7 m if Grupp == 6
    2.5 m if Grupp == 7
    2.7 m if Grupp == 8
    2.9 m if Grupp == 9
    "null" otherwise
# Fackverkets halva längd: | Fackverkets häjd, mellan centrumlinjerna:
Get_L.f(Grupp) :=
    2.4 m if Grupp == 0
    3.0 m if Grupp == 1
    3.6 m if Grupp == 2
    3.0 m if Grupp == 3
    3.6 m if Grupp == 4
    3.0 m if Grupp == 5
    3.0 m if Grupp == 6
    3.6 m if Grupp == 7
    2.4 m if Grupp == 8
    3.0 m if Grupp == 9
    "null" otherwise
Get_H.f(Grupp) :=
    1.4 m if Grupp == 0
    1.8 m if Grupp == 1
    2.2 m if Grupp == 2
    1.4 m if Grupp == 3
    1.8 m if Grupp == 4
    2.2 m if Grupp == 5
    1.4 m if Grupp == 6
    1.8 m if Grupp == 7
    2.2 m if Grupp == 8
    1.4 m if Grupp == 9
    "null" otherwise
# Takets egenvikt (horisontell takyta): | Golvets egenvikt:
Get_g,t,k(Grupp) :=
    0.85*kN/m^2 if Grupp == 0
    0.75*kN/m^2 if Grupp == 1
    0.65*kN/m^2 if Grupp == 2
    0.65*kN/m^2 if Grupp == 3
    0.75*kN/m^2 if Grupp == 4
    0.85*kN/m^2 if Grupp == 5
    075*kN/m^2 if Grupp == 6
    0.65*kN/m^2 if Grupp == 7
    0.75*kN/m^2 if Grupp == 8
    0.85*kN/m^2 if Grupp == 9
    "null" otherwise
Get_g,b,k(Grupp) :=
    0.3*kN/m^2 if Grupp == 0
    0.4*kN/m^2 if Grupp == 1
    0.5*kN/m^2 if Grupp == 2
    0.4*kN/m^2 if Grupp == 3
    0.3*kN/m^2 if Grupp == 4
    0.4*kN/m^2 if Grupp == 5
    0.3*kN/m^2 if Grupp == 6
    0.5*kN/m^2 if Grupp == 7
    0.3*kN/m^2 if Grupp == 8
    0.5*kN/m^2 if Grupp == 9
    "null" otherwise
# Kommun (för snölast):
Get_Kommun(Grupp) :=
    "Orsa" if Grupp == 0
    "Luleå" if Grupp == 1
    "Fagersta" if Grupp == 2
    "Härnösand" if Grupp == 3
    "Laxå" if Grupp == 4
    "Nykvarn" if Grupp == 5
    "Vindeln" if Grupp == 6
    "Enköping" if Grupp == 7
    "Eslöv" if Grupp == 8
    "Hällefors" if Grupp == 9
    "null" otherwise
# Var god vänd sida.
# INDATA
# Indata, fast
# Fast indata hämtad från ÖVN1 (2020, s.2).
b_tb := 45 mm
c_tb := 1200 mm
# Indata, varaiabel
# Variabel indata hämtad Tabell 1 i ÖVN1 (2020).
# Notera att datan hämtas från funktionsanrop.
# Funktionerna är definerade ovan.
L_nb := Get_L.nb(Grupp) = 7.2 m
a := Get_a(Grupp) = 3.8 m
β := Get_β(Grupp) = 22 deg
H_vägg := Get_H.vägg(Grupp) = 2.5 m
L_f := Get_L.f(Grupp) = 3.6 m
H_f := Get_H.f(Grupp) = 1.8 m
g_t,k := Get_g,t,k(Grupp) = 0.65 kN/m^2
g_b,k := Get_g,b,k(Grupp) = 0.5 kN/m^2
Kommun := Get_Kommun(Grupp) = "Enköping"
# Var god vänd sida.
# Indata, partialkoefficient
# Enligt EKS9 (2020) ger Säkerhetsklass 2:
γ_d := 0.91
# Enligt Tabell 2.3 i EK5 (2020):
γ_M,lvl := 1.2
γ_M,gl := 1.25
# Indata,Omräkningsfaktor
k_mod,lvl,P := 0.6
k_mod,lvl,M := 0.8
k_mod,gl,P := 0.6
k_mod,gl,M := 0.8
# Var god vänd sida.
# Indata, lastreduktion
# Psi-faktorn för snölaster fås enligt Tabell A1.1 i EKS9 (2020).
ψ_0,snö := 0.7
# Indata, Snölast
# Snölaster för olika kommuner är hämtad från EKS9 Tabell C-9.
Get_Snölast(Kommun) :=
    2.5*kN/m^2 if Kommun == "Orsa"
    3.0*kN/m^2 if Kommun == "Luleå"
    2.5*kN/m^2 if Kommun == "Fagersta"
    3.5*kN/m^2 if Kommun == "Härnösand"
    2.5*kN/m^2 if Kommun == "Laxå"
    2.0*kN/m^2 if Kommun == "Nykvarn"
    3.0*kN/m^2 if Kommun == "Vindeln"
    2*kN/m^2 if Kommun == "Enköping"
    1.5*kN/m^2 if (Kommun == "Eslöv")
    3.0*kN/m^2 if Kommun == "Hällefors"
    "null" otherwise
s_k := Get_Snölast(Kommun) = 2 kN/m^2
# INDATA, HÅLLFASTHETSDATA
# Fanerträ (LVL) - KERTO-S
# Hämtad från Tabell 3.6 (Svenskt Trä, 2016b).
f_m,0,edge,lvl,k := 44 MPa
f_s := 0.12
f_c,0,edge,lvl,k := 35 MPa
f_c,90,edge,lvl,k := 6 MPa
f_v,0,edge,lvl,k := 4.1 MPa
E_0,mean,lvl,k := 13800 MPa
# Limträ
# Hämtad från Tabell 3.6 (Svenskt Trä, 2016b).
f_m,0,gl,k := 36 MPa
f_t,0,gl,k := 26 MPa
f_c,0,gl,k := 31 MPa
f_c,90,gl,k := 3.6 MPa
f_v,0,gl,k := 4.3 MPa
E_0,mean,gl,k := 14700 MPa
E_0,gl,mean,k := 14700 MPa
E_0,gl,05,k := 11900 MPa
# KARAKTERISTISKA LASTER
# Karakteristiskt last, Snölast
# Snölast(er) kombineras enligt EN 1991-1-3 (13), (5.1).
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# Notera att takvinkeln aldrig överskrider 30 grader, där av blir μ=0.8.
μ_i := 0.8  # Formfaktor
C_e := 1  # Exponeringskoefficient
C_t := 1  # Temperaturkoefficient
s := μ_i*C_e*C_t*s_k = 1.6 kN/m^2
# Karakteristiskt last, Takbalk NM,
# Enligt ÖVN1 (2020) ska "den belastande ytan vara 10 % större
# än vad som svar mot c-avståndet mellan takbalkarna".
c_tb,mod := c_tb*1.1 = 1.32 m
# De karakteristiska linjelasterna blir således:
g_tb,k := g_t,k*c_tb,mod = 0.858 kN/m
s_tb,k := s*c_tb,mod = 2.112 kN/m
# Vi skiljer dessa åt för att underlätta kommande beräkningar.
# Karakteristiskt last, Nockbalk GHI
# Den belastade bredden blir för nockbalken blir:
2*a/2 = a  # disabled
# De karakteristiska linjelasterna blir således:
g_nb,k := g_t,k*a = 2.47 kN/m
s_nb,k := s*a = 6.08 kN/m
# Karakteristiskt last, Pelare BH
# Tabellfall Nr. 1 (Johannesson & Vretblad, 2011) ger:
R_S,B := 1.250*ql  # disabled
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# Således:
R_H := 1.250*(q_nb,k*L_nb)  # disabled
# De karakteristiska normalkrafter blir således:
N_g,k := 1.250*(g_nb,k*L_nb) = 22.23 kN
N_s,k := 1.250*(s_nb,k*L_nb) = 54.72 kN
# LASTKOMBINERING
# Data hämtad från Tabell A2.4(B) (SS-EN 1990, 2002, s. 64)
γ_G := 1.35
γ_P := 1.35
γ_d = 0.91
γ_Q := 1.5
ξ := 0.89
# Notera att:
P := 0
# Lastkombinering, Takbalk MN
q_tb,Ed,1 := γ_d*γ_G*g_tb,k + γ_d*γ_P*P + γ_d*γ_Q*ψ_0,snö*s_tb,k = 3.07207 kN/m
q_tb,Ed,2 := γ_d*ξ*γ_G*g_tb,k + γ_d*γ_P*P + γ_d*γ_Q*s_tb,k = 3.82099 kN/m
q_tb,Ed := max(q_tb,Ed,1, q_tb,Ed,2) = 3.82099 kN/m
# Lastkombinering, Nockbalk BHI
q_nb,Ed,1 := γ_d*γ_G*g_nb,k + γ_d*γ_P*P + γ_d*γ_Q*ψ_0,snö*s_nb,k = 8.84383 kN/m
q_nb,Ed,2 := γ_d*ξ*γ_G*g_nb,k + γ_d*γ_P*P + γ_d*γ_Q*s_nb,k = 10.9998 kN/m
q_nb,Ed := max(q_nb,Ed,1, q_nb,Ed,2) = 10.9998 kN/m
# Pelare BH, Lastkombinering
N_p,Ed,1 := γ_d*γ_G*N_g,k + γ_d*γ_P*P + γ_d*γ_Q*ψ_0,snö*N_s,k = 79.5945 kN
N_p,Ed,2 := γ_d*ξ*γ_G*N_g,k + γ_d*γ_P*P + γ_d*γ_Q*N_s,k = 98.9983 kN
N_p,Ed := max(N_p,Ed,1, N_p,Ed,2) = 98.9983 kN
# Avrudning enligt Facit ger:
N_p,Ed,round := round(N_p,Ed/SIUnitsOf(N_p,Ed), -1)*SIUnitsOf(N_p,Ed) = 99 kN
# Var god vänd sida.
# LASTEFFEKTER
# Takbalk MN, Lasteffekt
# Omvandling av den verkande lasten ger:
q_tb,Ed,y := q_tb,Ed*cos(β)*cos(β) = 3.28479 kN/m
q_tb,Ed,x := q_tb,Ed*cos(β)*sin(β) = 1.32714 kN/m
# Stödreaktioner
# Stödreaktioner fås enligt tabellfall:
R_tb,M := (q_tb,Ed*cos(β))*(a/cos(β))/2 = 7.25988 kN
R_tb,N := (q_tb,Ed*cos(β))*(a/cos(β))/2 = 7.25988 kN
# Normalkraft
N_tb,Ed(x) := q_tb,Ed,x*((a/cos(β))/2 - x)
N_tb,Ed.max := q_tb,Ed,x*(a/cos(β))/2 = 2.7196 kN
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# Tvärkraft
V_tb,Ed(x) := q_tb,Ed,y*((a/cos(β))/2 - x)
V_tb,Ed.max := q_tb,Ed,y*(a/cos(β))/2 = 6.73124 kN
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# Böjmoment
M_tb,Ed(x) := q_tb,Ed,y*((a/cos(β))*x - x^2)/2
M_tb,Ed,max := q_tb,Ed,y*((a/cos(β))^2)/8 = 6.89688 kN*m
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# Nockbalk GHI, Lasteffekt
# Stödreaktioner
# Stödreaktioner fås enligt tabellfall:
R_nb,G := 0.375*q_nb,Ed*L_nb = 29.6995 kN
R_nb,I := 0.375*q_nb,Ed*L_nb = 29.6995 kN
R_nb,H := 1.250*q_nb,Ed*L_nb = 98.9983 kN
# Tvärkraft
# Tvärkraft fås av superposition.
V_nb,Ed,0-1(x) := q_nb,Ed*(2*L_nb/2 - x) + (-N_p,Ed/2)
V_nb,Ed,1-2(x) := q_nb,Ed*(2*L_nb/2 - x) + N_p,Ed/2
V_nb,Ed,func(x) :=
    V_nb,Ed,0-1(x) if x < L_nb
    V_nb,Ed,1-2(x) if x > L_nb
V_nb,Ed,max := max(V_nb,Ed,0-1(0), V_nb,Ed,0-1(L_nb), V_nb,Ed,1-2(L_nb), V_nb,Ed,1-2(2*L_nb)) = 49.4992 kN
V_nb,Ed,min := min(V_nb,Ed,0-1(0), V_nb,Ed,0-1(L_nb), V_nb,Ed,1-2(L_nb), V_nb,Ed,1-2(2*L_nb)) = -49.4992 kN
# Var god vänd sida.
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# Böjmoment
# Böjmoment fås av superposition.
M_tb,Ed,0-1(x) := q_nb,Ed*((2*L_nb)*x - x^2)/2 + (-N_p,Ed*x/2)
M_tb,Ed,1-2(x) := q_nb,Ed*((2*L_nb)*x - x^2)/2 + (-N_p,Ed*(2*L_nb - x)/2)
M_nb,Ed,max := 0.1250*q_nb,Ed*L_nb^2 = 71.2788 kN*m
M_tb,Ed,func(x) :=
    M_tb,Ed,0-1(x) if x < L_nb
    M_tb,Ed,1-2(x) if x > L_nb
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# DIMENSIONERANDE HÅLLFASTHETSVÄRDEN
# LVL
f_m,lvl,d := k_mod,lvl,M*f_m,0,edge,lvl,k/γ_M,lvl = 29.3333 MPa
f_c,90,lvl,d := k_mod,lvl,M*f_c,90,edge,lvl,k/γ_M,lvl = 4 MPa
f_v,lvl,d := k_mod,lvl,M*f_v,0,edge,lvl,k/γ_M,lvl = 2.73333 MPa
# Limträ
f_m,gl,d := k_mod,gl,M*f_m,0,gl,k/γ_M,gl = 23.04 MPa
f_t,0,gl,d := k_mod,gl,M*f_t,0,gl,k/γ_M,gl = 16.64 MPa
f_c,0,gl,d := k_mod,gl,M*f_c,0,gl,k/γ_M,gl = 19.84 MPa
f_c,90,gl,d := k_mod,gl,M*f_c,90,gl,k/γ_M,gl = 2.304 MPa
f_v,gl,d := k_mod,gl,M*f_v,0,gl,k/γ_M,gl = 2.752 MPa
# DIMENSIONERING AV STOMMENS DELKOMPONENTER
# Tvärsnittshöjder
# Erforderlig tvärsnittshöjd på Takbalken MN
# Notera att följande del har löst symboliskt i MathCAD.
# Områden i turkos tillhör denna symboliska lösning.
# Eftersom detta inte är en kurs i MathCAD så följer ingen ytterligare förklaring kring detta.
Given
h_tb := b_tb
b_tb = 0.045 m
σ_m(h) := M_z/I_z*(h/2) == M_z/((b*h^3)/12)*(h/2)  # disabled
σ_m,lvl,d(h_tb) := M_tb,Ed,max/((b_tb*h_tb^3)/12)*(h_tb/2)
# Enligt Formel 3.3 i EK5 (2020) väljs h_k till:
k_h,lvl := 1.2
σ_m,lvl,d(h_tb) ≤ f_m,lvl,d*(300 mm/h_tb)^0.12
h_tb,ber := Find(h_tb) = 0.171198 m
# Nedan följer ett sätt att automatiskt välja tvärsnittshöjd. Detta är s.k. överkurs - därav ingen förklaring.
LVL_storlekar := [200; 225; 260; 300; 360; 400; 450; 500; 600]*mm
idx := match(min((LVL_storlekar - h_tb,ber)^2/h_tb,ber^2), (LVL_storlekar - h_tb,ber)^2/h_tb,ber^2) = [0]
LVL_storlekar[idx[0]] = 200 mm
LVL_storlekar[(1 + idx)[0]] = 0.225 m
h_tb,vald :=
    LVL_storlekar[(1 + idx)[0]] if LVL_storlekar[idx[0]] < h_tb,ber
    LVL_storlekar[idx[0]] otherwise
    = 200 mm
# Erforderlig tvärsnittshöjd på Nockbalken GHI
Given
h_nb(b_nb) := 4*b_nb
b_nb := 42 mm
M_nb,Ed,max/((b_nb*h_nb(b_nb)^3)/12)*(h_nb(b_nb)/2) ≤ f_m,gl,d*(600 mm/h_nb(b_nb))^0.1
b_nb,ber := Find(b_nb) = 103.794 mm
GL_bredder := [42; 56; 66; 78; 90; 115; 140; 165; 190; 215]*mm
idx := match(min((GL_bredder - b_nb,ber)^2/b_nb,ber^2), (GL_bredder - b_nb,ber)^2/b_nb,ber^2) = [5]
b_nb,vald :=
    GL_bredder[(1 + idx)[0]] if GL_bredder[idx[0]] < b_nb,ber
    GL_bredder[idx[0]] otherwise
    = 115 mm
Given
h_nb := 42 mm
M_nb,Ed,max/((b_nb,vald*h_nb^3)/12)*(h_nb/2) ≤ f_m,gl,d*(600 mm/h_nb)^0.1
h_nb,ber := Find(h_nb) = 393.367 mm
h_nb,vald :=
    round(h_nb,ber/(45 mm))*45*mm + 45 mm if round(h_nb,ber/(45 mm))*45*mm < h_nb,ber
    round(h_nb,ber/(45 mm))*45*mm otherwise
    = 405 mm
# Erforderlig tvärsnittshöjd på Pelaren BH
L_p,cr := H_vägg + a*tan(β) - h_nb,vald = 3630.3 mm
b_p := b_nb,vald = 0.115 m
β_c := 0.1
λ_z := L_p,cr*sqrt(12)/b_p = 109.354
λ_rel,z := λ_z/π*sqrt(f_c,0,gl,k/E_0,gl,05,k) = 1.77661
k := 0.5*(1 + β_c*(λ_rel,z - 0.3) + λ_rel,z^2) = 2.15201
k_c := 1/(k + sqrt(k^2 - λ_rel,z^2)) = 0.297052
h_p,ber := N_p,Ed/((k_c*f_c,0,gl,d)*b_p) = 146.068 mm
h_p,vald :=
    round(h_p,ber/(45 mm))*45*mm + 45 mm if round(h_p,ber/(45 mm))*45*mm < h_p,ber
    round(h_p,ber/(45 mm))*45*mm otherwise
    = 180 mm
# Brottkriterium med avseende på skjuvspänning
# Tvärsnitten har beräknats med avnseende på momentbärförmågan.
# Det som kvarstår är att kontrollera skjuvspänningarna för valda tvärsnitt.
# Enligt EK5:
k_cr,lvl := 1
k_cr,gl := 0.67
# Takbalken MN, Tvärkraft
b_tb,ef := k_cr,lvl*b_tb = 0.045 m
1.5*V_tb,Ed.max/(b_tb*h_tb,vald) ≤ f_v,lvl,d = 1
# Nockbalken GHI, Tvärkraft
b_nb,ef := k_cr,gl*b_nb,vald = 0.07705 m
1.5*V_nb,Ed,max/(b_nb,ef*h_nb,vald) ≤ f_v,gl,d = 1
# Var god vänd sida.
# Upplagslängd
# Erforderlig upplagslängd mot nockbalken
R_A,β := cos(β)*q_tb,Ed*a/2 = 6.73124 kN
l_M := R_A,β/(f_c,90,lvl,d*b_tb) = 37.3958 mm
k_c,90,tb :=
    1.75 if a*cos(β) ≥ 2*h_tb,vald
    1 otherwise
    = 1.75
l_M := R_A,β/((k_c,90,tb*f_c,90,lvl,d)*b_tb) = 21.369 mm
2*l_M*cos(β) ≤ b_nb,vald = 1
# Erforderlig upplagslängd mot pelare
k_c,90,nb := 1.75
l_H := R_nb,H/((k_c,90,nb*f_c,90,gl,d)*b_nb,vald) = 213.506 mm
l_H,verk lig := l_H - 2*30*mm = 0.153506 m
# NEDBÖJNING
# Takbalk MN, Omedelbar nedböjning
g_tb,ser := g_tb,k*cos(β)^2 = 0.737597 kN/m
s_tb,ser := s_tb,k*cos(β)^2 = 1.81562 kN/m
I_lvl := (b_tb*h_tb,vald^3)/12 = 3e-5 m^4
v_tb,inst := 5*g_tb,ser*(a/cos(β))^4/(384*E_0,mean,lvl,k*I_lvl) + 5*s_tb,ser*(a/cos(β))^4/(384*E_0,mean,lvl,k*I_lvl) = 22.6567 mm
v_tb,inst ≤ a/cos(β)/300 = 0
# Nedböjningen är beräknad i fältmitt. En mer korrekt utböjning ges av:
v_tb,inst,korrekt(x) := g_tb,ser*x*(a/cos(β))^3/(24*(E_0,mean,lvl,k*I_lvl))*(1 - 2*x^2/(a/cos(β))^2 + x^3/(a/cos(β))^3) + s_tb,ser*x*(a/cos(β))^3/(24*(E_0,mean,lvl,k*I_lvl))*(1 - 2*x^2/(a/cos(β))^2 + x^3/(a/cos(β))^3)
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# Maximal nedböjning fås vid:
v_tb,inst,prime(x) := d/dx(v_tb,inst,korrekt(x))
root(v_tb,inst,prime(x), x) =  # error: This variable is undefined.
x := 2 m
# Takbalk MN, ny tvärsnittshöjd
Given
h_tb,inst := h_tb,vald
5*g_tb,ser*(a/cos(β))^4/(384*E_0,mean,lvl,k*(b_tb*h_tb,inst^3)/12) + 5*s_tb,ser*(a/cos(β))^4/(384*E_0,mean,lvl,k*(b_tb*h_tb,inst^3)/12) ≤ a/cos(β)/300
h_tb,inst,ber := Find(h_tb,inst) = 236.736 mm
# Takbalk MN, ny tvärsnittshöjd m.a.p slutlig nedböjning
# OBS: Notera att h_(tb,fin) antas vara h_(tb,vald) och inte h_(tb,inst,ber.)
# Detta görs för att underlätta funktionen Find(),
Given
h_tb,fin := h_tb,vald
k_def := 0.6
ψ_2 :=
    0.2 if s_k ≥ 3*kN/m^2
    0.2 if 2.0*kN/m^2 ≤ s_k < 3.0*kN/m^2
    0.1 if 1.0*kN/m^2 ≤ s_k < 2.0*kN/m^2
    = 0.2
5*g_tb,ser*(a/cos(β))^4/(384*E_0,mean,lvl,k*(b_tb*h_tb,fin^3)/12)*(1 + k_def) + 5*s_tb,ser*(a/cos(β))^4/(384*E_0,mean,lvl,k*(b_tb*h_tb,fin^3)/12)*(1 + ψ_2*k_def) ≤ a/cos(β)/200
h_tb,fin,ber := Find(h_tb,fin) = 223.29 mm
h_tb,ser := max(h_tb,inst,ber, h_tb,fin,ber) = 0.236736 m
idx := match(min((LVL_storlekar - h_tb,ser)^2/h_tb,ser^2), (LVL_storlekar - h_tb,ser)^2/h_tb,ser^2) = [1]
h_tb,fin,vald :=
    LVL_storlekar[(1 + idx)[0]] if LVL_storlekar[idx[0]] < h_tb,ser
    LVL_storlekar[idx[0]] otherwise
    = 260 mm
# Nedböjning, Nockbalk GHI
v_mitt := 0.521*g_nb,k*L_nb^4/(100*E_0,gl,mean,k*((b_nb,vald*h_nb,vald^3)/12)) + 0.521*s_nb,k*L_nb^4/(100*E_0,gl,mean,k*((b_nb,vald*h_nb,vald^3)/12)) = 12.7919 mm
v_mitt ≤ L_nb/300 = 1
v_mitt,fin := 0.521*g_nb,k*L_nb^4/(100*E_0,gl,mean,k*((b_nb,vald*h_nb,vald^3)/12))*(1 + k_def) + 0.521*s_nb,k*L_nb^4/(100*E_0,gl,mean,k*((b_nb,vald*h_nb,vald^3)/12))*(1 + ψ_2*k_def) = 16.1007 mm
v_mitt,fin ≤ L_nb/200 = 1
